// SBML level 2 version 4

model Tuberculosis()
  // Tuberculosis

  // Compartments:
  compartment unnamed = 1;

  // Species:
  species Mf in unnamed = 0;
  species Mf in unnamed = 0;
  species T in unnamed = 0;
  species Tf in unnamed = 0;

  // Parameters:
  kf = 1;
  kf_1 = 1;
  kf_2 = 1;
  kf_3 = 1;
  kf_4 = 1;
  kf_5 = 1;
  kf_6 = 1;
  kf_7 = 1;
  kf_8 = 1;
  kf_9 = 1;
  kf_10 = 1;
  kf_11 = 1;
  kf_12 = 1;
  kf_13 = 1;

  // Reactions:
  Reaction_1: Mf + T => Mf; kf*Mf*T;
  Reaction_2: Mf => T; kf_1*Mf;
  Reaction_3: T => T; kf_2*T;
  Reaction_4: T => ; kf_3*T;
  Reaction_5: Mf => Mf; kf_4*Mf;
  Reaction_6: Mf + T => ; kf_5*Mf*T;
  Reaction_7: Tf => Tf; kf_6*Tf;
  Reaction_8: Tf + Mf => ; kf_7*Tf*Mf;
  Reaction_10: Mf + Tf + T => ; kf_9*Mf*Tf*T;
  Reaction_13: => Mf; kf_13;
end
